# Carácteristicas del motor de la plataforma lineal en caso que querer fabricarla
Paso := 10 mm
Velocidad := 20 cm/s  # rev/s
rev/s
Rev := 900 rpm
V := Rev*Paso = 94.2478 cm/s
Vel := 20 cm/s
Vel/Paso = 190.986 rpm
# enlace de plataforma guía: https://es.aliexpress.com/item/Linear-Actuator-system-Linear-Module-Table-600mm-travel-length-CNC-Guide-1605-Ballscrew-Sliding-Table/32736187220.html?spm=a219c.10010108.1000023.15.wVLfh2
Motor := 255.06 in·ozf = 1.80112 N*m
# Ese motor mueve una carga de 15Kg  en cualquier eje a velocidad entre 20-50mm/s
